// SBML level 2 version 1

model cell()

  // Compartments:
  compartment compartment = 1;

  // Species:
  species G in compartment = 0;
  species $Gavg in compartment = 0;
  species A in compartment = 400;
  species At in compartment = 400;
  species beta in compartment = 0.2;
  species $X in compartment = 0;

  // Parameters:
  alpha = 2000;
  b = 0.1;
  gamma = 1.5;
  n = 4;
  m = 10;
  Gtot = 2;
  eps = 0.1;
  Ab = 600;
  phi = 0.75;
  Gh = 0.3;

  // Reactions:
  _J1: $X => G; alpha*((b + beta*(A^m/(At^m + A^m)) + gamma*G^n/(1 + G^n))*(Gtot - G) - G);
  _J2: $X => At; -1*alpha*eps*(At - Ab*(1 - phi*G^n/(Gh^n + G^n)));
end
